P0 := 0
A := 0
L := 0
W := 0
pi1 := 0.6
P0 := 0
pi2 := 0.5
P1xxx := 0
P1011 := 0
P2011 := 0
P1001 := 0
Pxxx1 := 0
P1000 := 0
P1111 := 0
P1010 := 0
Pxx1x := 0
P2111 := 0
P2211 := 0
P2010 := 0
P2000 := 0
Px1xx := 0
P1211 := 0
Px2xx := 0
Given
P1000 == P2010*(1 - pi1) + P2011*(1 - pi2)*(1 - pi1)
P2010 == P1010*(1 - pi1) + P1011*(1 - pi2)*(1 - pi1) + P1000 + (1 - pi2)*P1001
P1010 == pi1*P2010 + pi1*(1 - pi2)*P2011 + (1 - pi1)*(1 - pi2)*P2111
P2011 == pi1*P1010 + pi2*P1001 + pi2*(1 - pi1)*P1011 + pi1*(1 - pi2)*P1011 + (1 - pi1)*(1 - pi2)*P1111
P1001 == pi2*(1 - pi1)*P2011
P1011 == pi1*pi2*P2011 + (1 - pi1)*(1 - pi2)*P2211 + pi2*(1 - pi1)*P2111 + pi1*(1 - pi2)*P2111
P2111 == pi1*pi2*P1011 + pi1*(1 - pi2)*P1111 + pi2*(1 - pi1)*P1111 + (1 - pi1)*(1 - pi2)*P1211
P1111 == pi1*pi2*P2111 + pi1*(1 - pi2)*P2211 + pi2*(1 - pi1)*P2211
P2211 == pi1*pi2*P1111 + pi1*(1 - pi2)*P1211 + pi2*(1 - pi1)*P1211
P1211 == pi1*pi2*P2211
P1211 + P1000 + P2010 + P1010 + P2011 + P1001 + P1011 + P2111 + P1111 + P2211 == 1
Pxxx1 == P2011 + P1001 + P1011 + P2111 + P1111 + P2211 + P1211
Pxx1x == P2010 + P1010 + P2011 + P1011 + P2111 + P1111 + P2211 + P1211
A == (1 - pi1)*Pxx1x + (1 - pi2)*Pxxx1
Px1xx == P2111 + P1111
Px2xx == P2211 + P1211
L == 1*Px1xx + 2*Px2xx
P1xxx == P1000 + P1010 + P1001 + P1011 + P1111 + P1211
Find(P1000, P2010, P1010, P2011, P1001, P1011, P2111, P1111, P2211, P1211, Pxxx1, Pxx1x, A, Px1xx, Px2xx, L, P1xxx) = [0.14875; 0.274268; 0.228517; 0.19504; 0.0390426; 0.0727792; 0.0270458; 0.00992144; 0.00354961; 0.00108663; 0.348465; 0.812207; 0.499115; 0.0369672; 0.00463624; 0.0462397; 0.500096]
