Given
λ := 2.5
m := 6
μ := 18
P0*m*λ == P1*μ
P1*(m - 1)*λ == P2*μ
P2*(m - 2)*λ == P3*μ
P3*(m - 3)*λ == P4*μ
P4*(m - 4)*λ == P5*μ
P5*(m - 5)*λ == P6*μ
P0 + P1 + P2 + P3 + P4 + P5 + P6 == 1
[P0; P1; P2; P3; P4; P5; P6] := Find(P0, P1, P2, P3, P4, P5, P6) → [0.343657096031; 0.286380913359; 0.198875634277; 0.110486463487; 0.046036026453; 0.0127877851258; 0.00177608126748]
k := 0*P0 + 1*P1 + 1*P2 + 1*P3 + 1*P4 + 1*P5 + 1*P6 = 0.656343
A := k*μ = 11.8142
Lc := 0*P0 + 1*P1 + 2*P2 + 3*P3 + 4*P4 + 5*P5 + 6*P6 = 1.27433
Wc := Lc/A = 0.107865
Given
m := 6
λ := 2.5
n := 2
μ := 9
ω := λ/μ
P1 == m*ω*p
P2 == m*(m - 1)/2*ω^2*p
P3 == m*(m - 1)*(m - 2)/3!*ω^3*p
P4 == (m - n)/n*ω*P3
P5 == (m - n)*(m - n - 1)/n^2*ω^2*P3
P6 == m!/(n!*n^(m - n))*ω^m*p
p + P1 + P2 + P3 + P4 + P5 + P6 == 1
[p; P1; P2; P3; P4; P5; P6] := Find(p, P1, P2, P3, P4, P5, P6) → [0.217369636188; 0.36228272698; 0.25158522707; 0.0931797137295; 0.0517665076275; 0.0215693781781; 0.00224681022689]
k := 0*P0 + 1*P1 + 2*(P2 + P3 + P4 + P5 + P6) = 1.20298
A := k*μ = 10.8268
Lc := 0*P0 + 1*P1 + 2*P2 + 3*P3 + 4*P4 + 5*P5 + 6*P6 = 1.47339
Wc := Lc/A = 0.136087
